<?xml version="1.0"?>
<!-- Generated by Ron Jensen using JavaProp
     Inputs:
                horsepower: 0.33525
                     pitch: fixed
            max engine rpm: 200
        prop diameter (ft): 0.82025

     Outputs:
              max prop rpm: 22874.73
                gear ratio:    0.01
                       Cp0: 0.003769
                       Ct0: 0.005276
       static thrust (lbs):    0.88
-->

<propeller name="X100_prop">
  <ixx>                0.00085 </ixx>
  <diameter unit="M"> 0.2 </diameter>
  <numblades>           2   </numblades>
  <minpitch>           30   </minpitch>
  <maxpitch>           30   </maxpitch>

  <table name="C_THRUST" type="internal">
     <tableData>
       0.0      0.070614
       0.1      0.065807
       0.2      0.054634
       0.3      0.04017
       0.4      0.023247
       0.5      0.004467
       0.55    -0.005458
       0.6	-0.015383
       0.65	-0.025308
       0.7	-0.035233
     </tableData>
  </table>

  <table name="C_POWER" type="internal">
     <tableData>
       0.0 	 0.026748
       0.1 	 0.026413
       0.2 	 0.02471
       0.3 	 0.021321
       0.4 	 0.015602
       0.5 	 0.007257
       0.55	 0.002025
       0.6	-0.003207
       0.65	-0.008439
       0.7	-0.013671
     </tableData>
  </table>
 <!-- thrust effects of helical tip Mach -->
 <table name="CT_MACH" type="internal">
   <tableData>
     0.85   1.0
     1.05   0.8
   </tableData>
 </table>

 <!-- power-required effects of helical tip Mach -->
 <table name="CP_MACH" type="internal">
   <tableData>
     0.85   1.0
     1.05   1.8
     2.00   1.4
   </tableData>
 </table>

</propeller>
