<?xml version="1.0"?>
<?xml-stylesheet href="http://jsbsim.sourceforge.net/JSBSim.xsl" type="text/xsl"?>
<fdm_config name="Gatewing X100" version="2.0"
 xmlns:xsi="http://www.w3.org/2001/XMLSchema-instance"
 xsi:noNamespaceSchemaLocation="http://jsbsim.sourceforge.net/JSBSim.xsd">

    <fileheader>
        <author> Ron Jensen Gijs de Rooy</author>
        <filecreationdate> 2012-03-14 </filecreationdate>
        <description> Gatewing X100 </description>
    </fileheader>

    <metrics>
        <wingarea  unit="M2">     0.23 </wingarea>
        <wingspan  unit="M" >     1.00 </wingspan>
        <wing_incidence>          0.00 </wing_incidence>
        <chord     unit="M" >     0.19 </chord>
        <htailarea unit="FT2">    0.0 </htailarea>
        <htailarm  unit="FT" >    0.0 </htailarm>
        <vtailarea unit="FT2">    0.0 </vtailarea>
        <vtailarm  unit="FT" >    0.0 </vtailarm>
        <location name="AERORP" unit="IN">
            <x>-0.094 </x>
            <y> 0 </y>
            <z> 0 </z>
        </location>
        <location name="EYEPOINT" unit="IN">
            <x> 20 </x>
            <y> 0 </y>
            <z> 5 </z>
        </location>
        <location name="VRP" unit="IN">
            <x> 0 </x>
            <y> 0 </y>
            <z> 0 </z>
        </location>
    </metrics>

    <mass_balance>
        <ixx unit="SLUG*FT2"> 1.5 </ixx>
        <iyy unit="SLUG*FT2"> 1.5 </iyy>
        <izz unit="SLUG*FT2"> 2.5 </izz>
        <ixy unit="SLUG*FT2"> 0 </ixy>
        <ixz unit="SLUG*FT2"> 0 </ixz>
        <iyz unit="SLUG*FT2"> 0 </iyz>
        <emptywt unit="KG"> 2 </emptywt>
        <location name="CG" unit="M">
            <x> -0.094 </x>
            <y>  0.00 </y>
            <z>  0.00 </z>
        </location>
        <pointmass name="payload">
            <weight unit="LBS"> 0 </weight>
            <location name="payload" unit="IN">
                <x> 0 </x>
                <y> 0 </y>
                <z> 0 </z>
            </location>
        </pointmass>
    </mass_balance>

    <ground_reactions>
        <contact type="STRUCTURE" name="NOSE">
            <location unit="M">
                <x> 0.298 </x>
                <y> 0     </y>
                <z> 0     </z>
            </location>
            <static_friction> 0.8 </static_friction>
            <dynamic_friction> 1.0 </dynamic_friction>
            <rolling_friction> 5.0 </rolling_friction>
            <spring_coeff unit="LBS/FT"> 80 </spring_coeff>
            <damping_coeff unit="LBS/FT/SEC"> 5 </damping_coeff>
            <max_steer unit="DEG"> 0.0 </max_steer>
            <brake_group> NONE </brake_group>
            <retractable>0</retractable>
        </contact>

        <contact type="STRUCTURE" name="BELLY_1">
            <location unit="M">
                <x> -0.100 </x>
                <y>  0.000 </y>
                <z> -0.050 </z>
            </location>
            <static_friction> 0.8 </static_friction>
            <dynamic_friction> 1.0 </dynamic_friction>
            <rolling_friction> 5.0 </rolling_friction>
            <spring_coeff unit="LBS/FT"> 80 </spring_coeff>
            <damping_coeff unit="LBS/FT/SEC"> 5 </damping_coeff>
            <max_steer unit="DEG"> 0.0 </max_steer>
            <brake_group> NONE </brake_group>
            <retractable>0</retractable>
        </contact>
        <contact type="STRUCTURE" name="BELLY_2">
            <location unit="M">
                <x>  0.000 </x>
                <y>  0.000 </y>
                <z> -0.040 </z>
            </location>
            <static_friction> 0.8 </static_friction>
            <dynamic_friction> 1.0 </dynamic_friction>
            <rolling_friction> 5.0 </rolling_friction>
            <spring_coeff unit="LBS/FT"> 80 </spring_coeff>
            <damping_coeff unit="LBS/FT/SEC"> 5 </damping_coeff>
            <max_steer unit="DEG"> 0.0 </max_steer>
            <brake_group> NONE </brake_group>
            <retractable>0</retractable>
        </contact>
        <contact type="STRUCTURE" name="TAIL">
            <location unit="M">
                <x>  0.200 </x>
                <y>  0.000 </y>
                <z> -0.030 </z>
            </location>
            <static_friction> 0.8 </static_friction>
            <dynamic_friction> 1.0 </dynamic_friction>
            <rolling_friction> 5.0 </rolling_friction>
            <spring_coeff unit="LBS/FT"> 80 </spring_coeff>
            <damping_coeff unit="LBS/FT/SEC"> 5 </damping_coeff>
            <max_steer unit="DEG"> 0.0 </max_steer>
            <brake_group> NONE </brake_group>
            <retractable>0</retractable>
        </contact>
        <contact type="STRUCTURE" name="LEFT_WING_TIP">
            <location unit="M">
                <x>  0.254 </x>
                <y> -0.500 </y>
                <z> -0.019 </z>
            </location>
            <static_friction> 0.8 </static_friction>
            <dynamic_friction> 1.0 </dynamic_friction>
            <rolling_friction> 5.0 </rolling_friction>
            <spring_coeff unit="LBS/FT"> 80 </spring_coeff>
            <damping_coeff unit="LBS/FT/SEC"> 5 </damping_coeff>
            <max_steer unit="DEG"> 0.0 </max_steer>
            <brake_group> NONE </brake_group>
            <retractable>0</retractable>
        </contact>
        <contact type="STRUCTURE" name="RIGHT_WING_TIP">
            <location unit="M">
                <x>  0.254 </x>
                <y>  0.500 </y>
                <z> -0.019 </z>
            </location>
            <static_friction> 0.8 </static_friction>
            <dynamic_friction> 1.0 </dynamic_friction>
            <rolling_friction> 5.0 </rolling_friction>
            <spring_coeff unit="LBS/FT"> 80 </spring_coeff>
            <damping_coeff unit="LBS/FT/SEC"> 5 </damping_coeff>
            <max_steer unit="DEG"> 0.0 </max_steer>
            <brake_group> NONE </brake_group>
            <retractable>0</retractable>
        </contact>

    </ground_reactions>

    <propulsion>
        <engine file="X100_engine">
            <location unit="M">
                <x> 0.27 </x>
                <y> 0    </y>
                <z> 0    </z>
            </location>
            <orient unit="DEG">
                <roll> 0.0 </roll>
                <pitch> 0 </pitch>
                <yaw> 0 </yaw>
            </orient>
            <feed>0</feed>
            <thruster file="X100_prop">
                <location unit="M">
                    <x> 0.27 </x>
                    <y> 0    </y>
                    <z> 0    </z>
                </location>
                <orient unit="DEG">
                    <roll> 0.0 </roll>
                    <pitch> 0.0 </pitch>
                    <yaw> 0.0 </yaw>
                </orient>
                <p_factor>1.0</p_factor>
            </thruster>
        </engine>
    </propulsion>

    <flight_control name="FCS: X100">
     <channel name="All">

        <summer name="Pitch Trim Sum">
            <input>fcs/elevator-cmd-norm</input>
            <input>fcs/pitch-trim-cmd-norm</input>
            <clipto>
                <min>-1</min>
                <max>1</max>
            </clipto>
        </summer>

        <aerosurface_scale name="Elevator Control">
            <input>fcs/pitch-trim-sum</input>
            <range>
                <min>-0.35</min>
                <max>0.3</max>
            </range>
            <output>fcs/elevator-pos-rad</output>
        </aerosurface_scale>

        <summer name="Roll Trim Sum">
            <input>fcs/aileron-cmd-norm</input>
            <input>fcs/roll-trim-cmd-norm</input>
            <clipto>
                <min>-1</min>
                <max>1</max>
            </clipto>
        </summer>

        <aerosurface_scale name="Left Aileron Control">
            <input>fcs/roll-trim-sum</input>
            <range>
                <min>-0.3</min>
                <max>0.3</max>
            </range>
            <output>fcs/left-aileron-pos-rad</output>
        </aerosurface_scale>

        <aerosurface_scale name="Right Aileron Control">
            <input>-fcs/roll-trim-sum</input>
            <range>
                <min>-0.3</min>
                <max>0.3</max>
            </range>
            <output>fcs/right-aileron-pos-rad</output>
        </aerosurface_scale>

        <summer name="Left Elevon Pos Rad">
           <input>fcs/left-aileron-pos-rad</input>
           <input>fcs/elevator-pos-rad</input>
           <clipto>
             <min> -0.35 </min>
             <max>  0.35 </max>
           </clipto>
           <output>fcs/left-elevon-pos-rad</output>
        </summer>

        <summer name="Right Elevon Pos Rad">
           <input>fcs/right-aileron-pos-rad</input>
           <input>fcs/elevator-pos-rad</input>
           <clipto>
             <min> -0.35 </min>
             <max>  0.35 </max>
           </clipto>
           <output>fcs/right-elevon-pos-rad</output>
        </summer>

        <pure_gain name="Left Elevon Pos Deg">
            <input>fcs/left-elevon-pos-rad</input>
            <gain>57.3</gain>
            <output>/surface-positions/left-elevon-pos-deg</output>
        </pure_gain>

        <pure_gain name="Right Elevon Pos Deg">
            <input>fcs/right-elevon-pos-rad</input>
            <gain>57.3</gain>
            <output>/surface-positions/right-elevon-pos-deg</output>
        </pure_gain>
     </channel>

    </flight_control>


    <aerodynamics>
   <function name="aero/function/cos-alpha">
    <description>Cosine of alpha</description>
     <cos>
      <property>aero/alpha-rad</property>
     </cos>
   </function>

   <function name="aero/function/sin-alpha">
    <description>Sine of alpha</description>
     <sin>
      <property>aero/alpha-rad</property>
     </sin>
   </function>

   <function name="aero/function/cos-beta">
    <description>Cosine of beta</description>
     <cos>
      <property>aero/beta-rad</property>
     </cos>
   </function>

   <function name="aero/function/sin-beta">
    <description>Sine of beta</description>
     <sin>
      <property>aero/beta-rad</property>
     </sin>
   </function>

   <function name="aero/function/cos2-alpha">
    <description>Cosine Squared of alpha</description>
     <product>
      <property>aero/function/cos-alpha</property>
      <property>aero/function/cos-alpha</property>
     </product>
   </function>

   <function name="aero/function/scos2-alpha">
    <description>Signed Cosine Squared of alpha</description>
     <product>
      <abs><property>aero/function/cos-alpha</property></abs>
      <property>aero/function/cos-alpha</property>
     </product>
   </function>

  <function name="aero/function/velocity-induced-fps">
   <description> velocity including the propulsion induced velocity.</description>
   <sum>
    <property>velocities/u-aero-fps</property>
    <property>propulsion/engine/prop-induced-velocity_fps</property>
    <property>propulsion/engine/prop-induced-velocity_fps</property>
   </sum>
  </function>

  <function name="aero/function/qbar-induced-psf">
   <description> q bar including the propulsion induced velocity.</description>
   <product>
    <property>aero/function/velocity-induced-fps</property>
    <property>aero/function/velocity-induced-fps</property>
    <property>atmosphere/rho-slugs_ft3</property>
    <value>0.5</value>
   </product>
  </function>

  <function name="aero/function/kCDge">
    <description>Change_in_drag_due_to_ground_effect</description>
    <product>
      <table>
        <independentVar>aero/h_b-mac-ft</independentVar>
        <tableData>
          0.0000	0.4800
          0.1000	0.5150
          0.1500	0.6290
          0.2000	0.7090
          0.3000	0.8150
          0.4000	0.8820
          0.5000	0.9280
          0.6000	0.9620
          0.7000	0.9880
          0.8000	1.0000
          0.9000	1.0000
          1.0000	1.0000
          1.1000	1.0000
       </tableData>
      </table>
    </product>
  </function>

  <function name="aero/function/kCLge">
    <description>Change_in_lift_due_to_ground_effect</description>
    <product>
      <table>
        <independentVar>aero/h_b-mac-ft</independentVar>
        <tableData>
           0.0000	1.2030
           0.1000	1.1270
           0.1500	1.0900
           0.2000	1.0730
           0.3000	1.0460
           0.4000	1.0350
           0.5000	1.0190
           0.6000	1.0130
           0.7000	1.0080
           0.8000	1.0060
           0.9000	1.0030
           1.0000	1.0020
           1.1000	1.0000
        </tableData>
      </table>
    </product>
  </function>
        <axis name="LIFT">
            <function name="aero/coefficient/CLalpha">
                <description>Lift_due_to_alpha</description>
                <product>
                    <property>aero/qbar-psf</property>
                    <property>metrics/Sw-sqft</property>
          <property>aero/function/kCLge</property>
                      <table>
                          <independentVar>aero/alpha-rad</independentVar>
                          <tableData>
	-3.142	0
	-2.356	1
	-1.571	0
	-0.785	-1.41
	-0.175	-0.433
	-0.105	-0.165
	-0.035	0.084
	-0.017	0.148
	0.000	0.214
	0.035	0.351
	0.070	0.492
	0.279	1.268
	0.314	1.337
	0.500	1
	0.785	1.414
	1.571	0
	2.356	-1
	3.142	0
                          </tableData>
                      </table>
                </product>
            </function>
<!-- Elevon FIX! -->
            <function name="aero/coefficient/CLdel">
                <description>Lift_due_to_Left_Elevon_Deflection</description>
                <product>
                    <property>aero/qbar-psf</property>
                    <property>metrics/Sw-sqft</property>
           <property>aero/function/cos-alpha</property>
                    <table>
                      <independentVar lookup="row">fcs/left-elevon-pos-rad</independentVar>
                      <tableData>
                         -0.350        -0.3945
                         -0.175        -0.1620
                         -0.087        -0.07222
                          0.000         0.000
                          0.087         0.05432
                          0.175         0.09165
                          0.350         0.1413
                      </tableData>
                    </table>
                </product>
            </function>
            <function name="aero/coefficient/CLder">
                <description>Lift_due_to_Right_Elevon_Deflection</description>
                <product>
                    <property>aero/qbar-psf</property>
                    <property>metrics/Sw-sqft</property>
           <property>aero/function/cos-alpha</property>
                    <table>
                      <independentVar lookup="row">fcs/right-elevon-pos-rad</independentVar>
                      <tableData>
                         -0.350        -0.3945
                         -0.175        -0.1620
                         -0.087        -0.07222
                          0.000         0.000
                          0.087         0.05432
                          0.175         0.09165
                          0.350         0.1413
                      </tableData>
                    </table>
                </product>
            </function>
        </axis>

        <axis name="DRAG">
            <function name="aero/coefficient/CD0">
                <description>Drag_at_zero_lift</description>
                <product>
                    <property>aero/qbar-psf</property>
                    <property>metrics/Sw-sqft</property>
                      <table>
                          <independentVar>aero/alpha-rad</independentVar>
                          <tableData>
                         -3.142  0.05
                         -2.356  0.707
                         -1.571  1.0
                         -0.785  0.707
                         -0.175  0.046
                         -0.105  0.024
                         -0.070  0.021
                         -0.035  0.022
                          0.000  0.028
                          0.017  0.033
                          0.070  0.057
                          0.105  0.081
                          0.140  0.111
                          0.244  0.219
                          0.279  0.25
                          0.314  0.275
                          0.785  0.707
                          1.571  1.0
                          2.356  0.707
                          3.142  0.05
                          </tableData>
                      </table>
                </product>
            </function>
            <function name="aero/coefficient/CDi">
                <description>Induced_drag</description>
                <product>
                    <property>aero/qbar-psf</property>
                    <property>metrics/Sw-sqft</property>
                    <property>aero/cl-squared</property>
                    <value>0.0400</value>
                </product>
            </function>
            <function name="aero/coefficient/CDbeta">
                <description>Drag_due_to_sideslip</description>
                <product>
                    <property>aero/qbar-psf</property>
                    <property>metrics/Sw-sqft</property>
                      <table>
                          <independentVar>aero/beta-rad</independentVar>
                          <tableData>
                             -3.142      0.006
                             -1.5700     1.2300
                             -0.2600     0.0500
                              0.0000     0.0000
                              0.2600     0.0500
                              1.5700     1.2300
                              3.142      0.006
                          </tableData>
                      </table>
                </product>
            </function>
<!-- Elevon FIX! -->
            <function name="aero/coefficient/CDdel">
                <description>Drag_due_to_Elevon_Deflection</description>
                <product>
                    <property>aero/qbar-psf</property>
                    <property>metrics/Sw-sqft</property>
           <property>aero/function/cos-alpha</property>
                    <table>
                      <independentVar lookup="row">aero/alpha-rad</independentVar>
                      <independentVar lookup="column">fcs/left-elevon-pos-rad</independentVar>
                        <tableData>
               -0.35       -0.17       -0.09        0.00        0.09        0.17        0.35
     -0.279     0.05574     0.01892     0.00775     0.00000    -0.00513    -0.00826    -0.01200
     -0.140     0.03604     0.01082     0.00413     0.00000    -0.00239    -0.00366    -0.00489
     -0.105     0.03112     0.00879     0.00323     0.00000    -0.00171    -0.00251    -0.00311
     -0.070     0.02619     0.00677     0.00233     0.00000    -0.00102    -0.00135    -0.00133
     -0.035     0.02127     0.00474     0.00142     0.00000    -0.00034    -0.00020     0.00044
      0.000     0.01141     0.00069    -0.00038     0.00000     0.00103     0.00210     0.00400
      0.035     0.01141     0.00069    -0.00038     0.00000     0.00103     0.00210     0.00400
      0.070     0.00649    -0.00133    -0.00129     0.00000     0.00172     0.00325     0.00578
      0.140    -0.00336    -0.00539    -0.00309     0.00000     0.00308     0.00555     0.00933
      0.157    -0.00582    -0.00640    -0.00354     0.00000     0.00343     0.00612     0.01022
      0.175    -0.00829    -0.00741    -0.00400     0.00000     0.00377     0.00670     0.01111
      0.209    -0.01321    -0.00944    -0.00490     0.00000     0.00445     0.00785     0.01289
      0.244    -0.01814    -0.01146    -0.00580     0.00000     0.00514     0.00900     0.01466
      0.279    -0.02306    -0.01349    -0.00671     0.00000     0.00582     0.01015     0.01644
      0.314    -0.02799    -0.01551    -0.00761     0.00000     0.00651     0.01130     0.01822
      0.332    -0.03045    -0.01652    -0.00806     0.00000     0.00685     0.01187     0.01911
      0.349    -0.03291    -0.01754    -0.00851     0.00000     0.00719     0.01245     0.01999
      0.367    -0.03538    -0.01855    -0.00896     0.00000     0.00753     0.01302     0.02088
      0.384    -0.03784    -0.01956    -0.00942     0.00000     0.00788     0.01360     0.02177
      0.419    -0.04276    -0.02159    -0.01032     0.00000     0.00856     0.01475     0.02355
                     </tableData>
                   </table>
                </product>
            </function>
            <function name="aero/coefficient/CDder">
                <description>Drag_due_to_Right_Elevon_Deflection</description>
                <product>
                    <property>aero/qbar-psf</property>
                    <property>metrics/Sw-sqft</property>
           <property>aero/function/cos-alpha</property>
                    <table>
                      <independentVar lookup="row">aero/alpha-rad</independentVar>
                      <independentVar lookup="column">fcs/right-elevon-pos-rad</independentVar>
                        <tableData>
               -0.35       -0.17       -0.09        0.00        0.09        0.17        0.35
     -0.279     0.05574     0.01892     0.00775     0.00000    -0.00513    -0.00826    -0.01200
     -0.140     0.03604     0.01082     0.00413     0.00000    -0.00239    -0.00366    -0.00489
     -0.105     0.03112     0.00879     0.00323     0.00000    -0.00171    -0.00251    -0.00311
     -0.070     0.02619     0.00677     0.00233     0.00000    -0.00102    -0.00135    -0.00133
     -0.035     0.02127     0.00474     0.00142     0.00000    -0.00034    -0.00020     0.00044
      0.000     0.01141     0.00069    -0.00038     0.00000     0.00103     0.00210     0.00400
      0.035     0.01141     0.00069    -0.00038     0.00000     0.00103     0.00210     0.00400
      0.070     0.00649    -0.00133    -0.00129     0.00000     0.00172     0.00325     0.00578
      0.140    -0.00336    -0.00539    -0.00309     0.00000     0.00308     0.00555     0.00933
      0.157    -0.00582    -0.00640    -0.00354     0.00000     0.00343     0.00612     0.01022
      0.175    -0.00829    -0.00741    -0.00400     0.00000     0.00377     0.00670     0.01111
      0.209    -0.01321    -0.00944    -0.00490     0.00000     0.00445     0.00785     0.01289
      0.244    -0.01814    -0.01146    -0.00580     0.00000     0.00514     0.00900     0.01466
      0.279    -0.02306    -0.01349    -0.00671     0.00000     0.00582     0.01015     0.01644
      0.314    -0.02799    -0.01551    -0.00761     0.00000     0.00651     0.01130     0.01822
      0.332    -0.03045    -0.01652    -0.00806     0.00000     0.00685     0.01187     0.01911
      0.349    -0.03291    -0.01754    -0.00851     0.00000     0.00719     0.01245     0.01999
      0.367    -0.03538    -0.01855    -0.00896     0.00000     0.00753     0.01302     0.02088
      0.384    -0.03784    -0.01956    -0.00942     0.00000     0.00788     0.01360     0.02177
      0.419    -0.04276    -0.02159    -0.01032     0.00000     0.00856     0.01475     0.02355
                     </tableData>
                   </table>
                </product>
            </function>
        </axis>

        <axis name="SIDE">
            <function name="aero/coefficient/CYb">
                <description>Side_force_due_to_beta</description>
                <product>
                    <property>aero/qbar-psf</property>
                    <property>metrics/Sw-sqft</property>
           <property>aero/function/sin-beta</property>
                    <value>-.194</value>
                </product>
            </function>
        </axis>

        <axis name="ROLL">
            <function name="aero/coefficient/Clb">
                <description>Roll_moment_due_to_beta</description>
                <!-- aka dihedral effect -->
                <product>
                    <property>aero/qbar-psf</property>
                    <property>metrics/Sw-sqft</property>
                    <property>metrics/bw-ft</property>
           <property>aero/function/sin-beta</property>
                    <value>-0.0500</value>
                </product>
            </function>
    <function name="aero/coefficient/Clp">
       <description>Roll moment due to roll rate extended to work at zero velocity</description>
       <product>
        <value>-0.35</value> <!-- Clp -->
        <property>velocities/p-aero-rad_sec</property>
        <property>atmosphere/rho-slugs_ft3</property>
        <property>metrics/Sw-sqft</property>
        <property>metrics/bw-ft</property>
        <property>metrics/bw-ft</property> <!-- b^2 -->
        <value>0.0625</value> <!-- constant from function -->
        <pow>
         <sum>
          <product>
           <property>metrics/bw-ft</property>
           <property>metrics/bw-ft</property> <!-- b^2 -->
           <property>velocities/p-aero-rad_sec</property>
           <property>velocities/p-aero-rad_sec</property><!-- Omega^2 -->
          </product>
          <product>
           <property>velocities/u-aero-fps</property>
           <property>velocities/u-aero-fps</property>
           <value>16</value>
          </product>
         </sum>
         <value>0.5</value>
        </pow>
       </product>
      </function>

            <function name="aero/coefficient/Clr">
                <description>Roll_moment_due_to_yaw_rate</description>
                <product>
                    <property>aero/qbar-psf</property>
                    <property>metrics/Sw-sqft</property>
                    <property>metrics/bw-ft</property>
                    <property>aero/bi2vel</property>
                    <property>velocities/r-aero-rad_sec</property>
                    <value>0.0700</value>
                </product>
            </function>
<!-- Elevon FIX! -->
            <function name="aero/coefficient/Clde">
                <description>Roll_moment_due_to__elevon_deflection</description>
                <product>
                   <value>      .5</value>
                   <difference>
                      <property>aero/coefficient/CLdel</property>
                      <property>aero/coefficient/CLder</property>
                   </difference>
                </product>
            </function>
        </axis>

        <axis name="PITCH">
            <function name="aero/coefficient/Cmalpha">
                <description>Pitch_moment_due_to_alpha</description>
                <product>
                    <property>aero/qbar-psf</property>
                    <property>metrics/Sw-sqft</property>
                    <property>metrics/cbarw-ft</property>
           <property>aero/function/sin-alpha</property>
                    <value>-0.5000</value>
                </product>
            </function>
<!-- Elevon FIX! -->
            <function name="aero/coefficient/Cmdel">
                <description>Pitch_moment_due_to_left_elevon</description>
                <product>
                    <property>aero/qbar-psf</property>
                    <property>metrics/Sw-sqft</property>
                    <property>metrics/cbarw-ft</property>
           <property>aero/function/cos-alpha</property>
                    <table>
                        <independentVar>fcs/left-elevon-pos-rad</independentVar>
                        <tableData>
                          -0.35  0.5129
                          -0.17  0.2082
                          -0.09  0.09017
                           0.00  0.000000
                           0.09 -0.07708
                           0.17 -0.1263
                           0.35 -0.2701
                        </tableData>
                    </table>
                </product>
            </function>
            <function name="aero/coefficient/Cmder">
                <description>Pitch_moment_due_to_right_elevon</description>
                <product>
                    <property>aero/qbar-psf</property>
                    <property>metrics/Sw-sqft</property>
                    <property>metrics/cbarw-ft</property>
           <property>aero/function/cos-alpha</property>
                    <table>
                        <independentVar>fcs/right-elevon-pos-rad</independentVar>
                        <tableData>
                          -0.35  0.5129
                          -0.17  0.2082
                          -0.09  0.09017
                           0.00  0.000000
                           0.09 -0.07708
                           0.17 -0.1263
                           0.35 -0.2701
                        </tableData>
                    </table>
                </product>
            </function>
    <function name="aero/coefficient/Cmq">
       <description>Pitch_moment_due_to_pitch_rate extended to work at zero velocity</description>
       <product>
        <value>-12.</value> <!-- CMAD -->
        <property>velocities/q-aero-rad_sec</property>
        <property>atmosphere/rho-slugs_ft3</property>
        <property>metrics/Sw-sqft</property>
        <property>metrics/cbarw-ft</property>
        <property>metrics/cbarw-ft</property> <!-- b^2 -->
        <value>0.0625</value> <!-- constant from function -->
        <pow>
         <sum>
          <product>
           <property>metrics/cbarw-ft</property>
           <property>metrics/cbarw-ft</property> <!-- b^2 -->
           <property>velocities/q-aero-rad_sec</property>
           <property>velocities/q-aero-rad_sec</property><!-- Omega^2 -->
          </product>
          <product>
           <property>velocities/u-aero-fps</property>
           <property>velocities/u-aero-fps</property>
           <value>16</value>
          </product>
         </sum>
         <value>0.5</value>
        </pow>
       </product>
      </function>

            <function name="aero/coefficient/Cmadot">
                <description>Pitch_moment_due_to_alpha_rate</description>
                <product>
                    <property>aero/qbar-psf</property>
                    <property>metrics/Sw-sqft</property>
                    <property>metrics/cbarw-ft</property>
                    <property>aero/ci2vel</property>
                    <property>aero/alphadot-rad_sec</property>
                    <value>-7.0000</value>
                </product>
            </function>
        </axis>

        <axis name="YAW">
            <function name="aero/coefficient/Cnb">
                <description>Yaw_moment_due_to_beta</description>
                <product>
                    <property>aero/qbar-psf</property>
                    <property>metrics/Sw-sqft</property>
                    <property>metrics/bw-ft</property>
          <property>aero/function/sin-beta</property>
                    <value>0.1200</value>
                </product>
            </function>

    <function name="aero/coefficient/Cnr">
       <description>Yaw_moment_due_to_yaw_rate extended to work at zero velocity</description>
       <product>
        <value>-0.1411</value> <!-- CNR -->
        <property>velocities/r-aero-rad_sec</property>
        <property>atmosphere/rho-slugs_ft3</property>
        <property>metrics/Sw-sqft</property>
        <property>metrics/bw-ft</property>
        <property>metrics/bw-ft</property> <!-- b^2 -->
        <value>0.0625</value> <!-- constant from function -->
        <pow>
         <sum>
          <product>
           <property>metrics/bw-ft</property>
           <property>metrics/bw-ft</property> <!-- b^2 -->
           <property>velocities/r-aero-rad_sec</property>
           <property>velocities/r-aero-rad_sec</property><!-- Omega^2 -->
          </product>
          <product>
           <property>velocities/u-aero-fps</property>
           <property>velocities/u-aero-fps</property>
           <value>16</value>
          </product>
         </sum>
         <value>0.5</value>
        </pow>
       </product>
      </function>

         <function name="aero/coefficient/Cnda">
            <description>
               Yaw Moment Coefficient due to Asymetrical Plain Flaps Deflection
               calculated as difference between left and right flap drag coef,
               times distance from centerline to MAC of surface.
            </description>
            <product>
               <value>      .5</value>
               <difference>
                  <property>aero/coefficient/CDdel</property>
                  <property>aero/coefficient/CDder</property>
               </difference>
            </product>
         </function>
        </axis>
    </aerodynamics>

    <external_reactions>
        <force name="catapult" frame="BODY">
            <location unit="M">
                    <x> 0 </x>
                    <y> 0 </y>
                    <z> 0 </z>
            </location>
            <direction>
                <x>1</x>
                <y>0</y>
                <z>0</z>
            </direction>
        </force>
    </external_reactions>

</fdm_config>
